# Biegekopf – Nachrechnung auf Basis der gemessenen Biegemomente
# 1  Gemessene Biegemomente (Rohr 14 × 1 mm, 1.4404)
# Gewicht x an Hebellänge l an der händischen Biegelehre angehängt, bis sich das Rohr gebogen hat.
x_1 := 20 kg
l_1 := 80 cm
M_1 := x_1*g*l_1 = 156.906 N*m  # Messung 1: 20 kg an 80 cm
x_2 := 34 kg
l_2 := 50 cm
M_2 := x_2*g*l_2 = 166.713 N*m  # Messung 2: 34 kg an 50 cm
x_3 := 23 kg
l_3 := 60 cm
M_3 := x_3*g*l_3 = 135.332 N*m  # Messung 3: 23 kg an 60 cm
x_4 := 42 kg
l_4 := 40 cm
M_4 := x_4*g*l_4 = 164.752 N*m  # Messung 4: 42 kg an 40 cm
x_5 := 48 kg
l_5 := 30 cm
M_5 := x_5*g*l_5 = 141.216 N*m  # Messung 5: 48 kg an 30 cm
M_mess := M_2 = 166.713 N*m  # größter Messwert (Messung 2) = maßgebend
S_B := 1.3 = 1.3  # Zuschlag für Streuung Material/Reibung (wie bisher gewählt)
M_B := S_B*M_mess = 216.727 N*m  # Auslegungs-Biegemoment
# 2  Geometrie Biegekopf (aus CAD) und Kraft an der Druckrolle
a := 70.7 mm = 70.7 mm  # Achsabstand Biegerolle – Druckrolle (BG003)
F_Rmess := M_mess/a = 2358.03 N  # Rollenkraft bei Messmoment
F_R := M_B/a = 3065.45 N  # Rollenkraft bei Auslegungsmoment
# 3  Antrieb: Motor Panasonic MSMF082L1U1 + Getriebe APEX AB115-100-S2-P2
T_MN := 2.39 N*1 m = 2.39 N*m  # Motor-Nennmoment
T_Mmax := 7.16 N*1 m = 7.16 N*m  # Motor-Spitzenmoment
n_MN := 3000/min = 3000 1/min  # Motor-Nenndrehzahl
P_MN := 750 W = 750 W  # Motor-Nennleistung
i := 100 = 100
# Getriebeübersetzung
η := 0.94 = 0.94
# Wirkungsgrad 2-stufig (APEX: ≥ 94 %)
T_2N := 208 N*1 m = 208 N*m  # Nenn-Abtriebsmoment AB115 i=100 (APEX-Katalog, bitte im Datenblatt bestätigen)
T_2NOT := 3*T_2N = 624 N*m  # Not-Aus-Moment = 3 · T2N (APEX)
# Erforderliches Motormoment und Auslastung:
T_Merf := M_B/(i*η) = 2.30561 N*m  # nötiges Motormoment für M_B
ν_Motor := T_Merf/T_MN = 0.964689  # Auslastung Motor (≤ 1)
T_abN := T_MN*i*η = 224.66 N*m  # Abtriebsmoment bei Motor-Nennmoment
ν_Getr := M_B/T_2N = 1.04196  # Auslastung Getriebe bezogen auf T2N
T_abmax := T_Mmax*i*η = 673.04 N*m
# Abtriebsmoment bei Motor-Spitzenmoment!
ν_NOT := T_abmax/T_2NOT = 1.07859
# > 1: Motor kann Getriebe zerstören → Momentenbegrenzung
# → Getriebe: M_B liegt rund 4 % über T2N. Das ist nur im Aussetzbetrieb zulässig (kurze Biegezeit, max. Beschleunigungsmoment T2B laut APEX-Datenblatt prüfen).
# → Im Servoverstärker MUSS eine Momentenbegrenzung eingestellt werden (Minas A6: Parameter Pr0.13). Die Grenze ergibt sich aus dem schwächsten Bauteil (siehe Kapitel 5 und 10).
# Drehzahl, Biegezeit, Leistung:
n_ab := n_MN/i = 30 1/min  # Abtriebsdrehzahl bei Motor-Nenndrehzahl
ω_ab := 2*π*n_ab = 3.14159 1/s  # Winkelgeschwindigkeit in rad/s
t_180 := π/ω_ab = 1 s
# Zeit für eine 180°-Biegung
P_B := M_B*ω_ab = 680.868 W  # Biegeleistung am Abtrieb
ν_P := P_B/(η*P_MN) = 0.96577  # Auslastung Motorleistung
# 4  Radialkraft am Getriebeabtrieb
# Die Rollenkraft F_R wirkt in der Rohrebene, 90 mm unter dem Getriebeflansch. Laut CAD sitzt die Aufnahme BT007 zusätzlich über das Lager 6205 auf dem festen Bolzen der Biegerolle. Nur wenn dieses Lager die Radialkraft aufnimmt, ist der Getriebeabtrieb entlastet. Abschätzung für den Fall OHNE Abstützung über das 6205:
# zul. Radialkraft AB115 in Wellenmitte (APEX)
F_2rB := 6700 N = 6700 N
L_W := 51 mm = 51 mm  # Länge Abtriebswelle Ø32 (STEP Getriebe)
x_F := 90 mm = 90 mm  # Abstand Flansch → Rohrebene (BG003)
M_kist := F_R*x_F = 275.89 N*m  # Kippmoment am Abtrieb
M_kzul := F_2rB*L_W/2 = 170.85 N*m
# vereinfachter Vergleichswert F2rB · L/2
ν_Rad := M_kist/M_kzul = 1.61481  # > 1 → Lager 6205 auf Festbolzen ist zwingend nötig
# 5  Passfeder Getriebewelle Ø32 → Aufnahme BT007 (Aluminium 6061)
d_W := 32 mm = 32 mm  # Wellendurchmesser
b_PF := 10 mm = 10 mm  # Passfeder DIN 6885 A 10×8×40
h_PF := 8 mm = 8 mm
t_1 := 5 mm = 5 mm  # Wellennuttiefe
l_PF := 40 mm = 40 mm
l_tr := l_PF - b_PF = 30 mm  # tragende Länge (rundstirnig)
R_pAl := 240 MPa = 240 MPa  # Rp0,2 EN AW-6061 T6
p_PF := 2*M_B/(d_W*(h_PF - t_1)*l_tr) = 150.505 MPa
# Flächenpressung Nabe bei M_B
S_PF := R_pAl/p_PF = 1.59463  # Sicherheit gegen Fließen der Al-Nabe
p_PFmax := 2*T_abmax/(d_W*(h_PF - t_1)*l_tr) = 467.389 MPa
# bei Motor-Spitzenmoment
# → Bei M_B ist die Sicherheit mit ca. 1,6 knapp. Für schwellende Last (jede Biegung) und eine Aluminiumnabe ist das zu wenig, weil die Nut ausschlägt. Empfehlung: Nabe aus Stahl (z. B. S355 oder C45) oder Momentenbegrenzung deutlich unter M_B. Beim Motor-Spitzenmoment versagt die Nabe sicher.
# 6  Verbindung Aufnahme → Hebelrohr: 4 Schrauben M8 (radial)
n_S := 4 = 4
# Anzahl Schrauben M8 (AS 1427 M8×16)
r_S := 30 mm = 30 mm  # Scherfuge = Nabenaußenradius (Ø59,8)
F_S := M_B/(n_S*r_S) = 1806.06 N  # Querkraft je Schraube
A_S := 36.6 mm*1 mm = 36.6 mm^2  # Spannungsquerschnitt M8
τ_S := F_S/A_S = 49.3458 MPa
# Scherspannung (Gewinde in Scherfuge)
S_τS := 0.6*640 MPa/τ_S = 7.78181
# Sicherheit Festigkeitsklasse 8.8 (τ_F ≈ 0,6·Rp0,2)
t_Wand := 5 mm = 5 mm  # Wandstärke Rohr 70×70×5
p_L := F_S/(8 mm*t_Wand) = 45.1515 MPa
# Lochleibung in der Rohrwand
S_L := 235 MPa/p_L = 5.20471  # Sicherheit gegen ReH S235
# 7  Hebelrohr 70 × 70 × 5 (S235)
l_H := a - r_S = 40.7 mm  # Hebelarm Rolle → Nabenrand
M_H := F_R*l_H = 124.764 N*m  # Biegemoment am Nabenrand
W_H := ((70 mm)^4 - (60 mm)^4)/(6*70 mm) = 26309.5 mm^3
# Widerstandsmoment (scharfkantig)
σ_H := M_H/W_H = 4.74215 MPa
e_T := 45 mm = 45 mm  # Versatz Rohrebene → Profilmitte
T_H := F_R*e_T = 137.945 N*m  # Torsion des Hebels
W_tH := 2*65 mm*65 mm*t_Wand = 42250 mm^3
# Bredt: 2·Am·t
τ_H := T_H/W_tH = 3.26497 MPa
σ_vH := (σ_H^2 + 3*τ_H^2)^0.5 = 7.38025 MPa
# Vergleichsspannung GEH
S_H := 235 MPa/σ_vH = 31.8417  # sehr große Reserve
# 8  Druckrolle: Bolzen BT009 (Al 6061, Ø25) und Nadelhülse HK2520
# Laut STEP-Export endet der Bolzen bei der Rohrmittelebene. Er trägt die 20 mm breite Nadelhülse daher nur auf 10 mm.
d_B := 25 mm = 25 mm
e_B := 12.5 mm = 12.5 mm  # Hebelarm Wandmitte → Rollenmitte
W_B := π*d_B^3/32 = 1533.98 mm^3
σ_B := F_R*e_B/W_B = 24.9795 MPa  # Biegespannung Bolzen
τ_B := 4*F_R/(3*π*d_B^2/4) = 8.3265 MPa
# max. Schubspannung
S_B2 := R_pAl/σ_B = 9.60788  # Festigkeit Bolzen ausreichend
C_0HK := 32.5 kN = 32500 N  # statische Tragzahl HK2520
s_0HK := C_0HK*10 mm/(20 mm)/F_R = 5.30102
# nur halbe Breite tragend
# → Rechnerisch ausreichend, ABER: Eine Nadelhülse braucht eine gehärtete Laufbahn (≥ 670 HV / 58 HRC, geschliffen). Auf einem Aluminiumbolzen ist das unzulässig. Lösung: gehärteter Stahlbolzen Ø25 (z. B. 100Cr6, h6) oder Innenring IR verwenden, und den Bolzen über die volle Lagerbreite verlängern.
# 9  Lager 6205 und Festbolzen der Biegerolle (Bolzen.ipt, Al 6061, Ø25)
C_06205 := 7.8 kN = 7800 N  # statische Tragzahl SKF 6205
s_06205 := C_06205/F_R = 2.54449  # statische Kennzahl (≥ 1,5–2 bei langsamer Drehung)
e_FB := 27.5 mm = 27.5 mm  # Lagermitte 6205 → Oberkante Biegelehre (Annahme)
σ_FB := F_R*e_FB/W_B = 54.9549 MPa  # Biegespannung Festbolzen (Abschätzung)
S_FB := R_pAl/σ_FB = 4.36722
# 10  Reaktionsmoment: Werkzeugwechsler SCHUNK SWS-020 und Roboter
# Das Gehäuse ist laut CAD nur am Roboter befestigt (keine Drehmomentstütze zur Biegelehre). Das Gegenmoment zum Biegemoment geht daher komplett über Wechsler SWS-020 und Roboter-Achse 6.
M_zSWS := 105 N*1 m = 105 N*m  # zul. Mz SWK-020 / SWA-020 (SCHUNK)
ν_SWSmess := M_mess/M_zSWS = 1.58774
# Auslastung schon beim Messmoment
ν_SWS := M_B/M_zSWS = 2.06407  # Auslastung bei M_B (≤ 1 nötig)
# 11  Masse des Biegekopfs und Roboter-Traglast
# Massen aus Inventor-iProperties (Volumen × Dichte). Motor und Getriebe sind im CAD als „Generisch“ (1 g/cm³) hinterlegt. Daher gelten hier die Datenblattwerte. Deckel, Halterungen und Distanzleisten sind ebenfalls „Generisch“ und werden als Aluminium angesetzt.
ρ_Al := 2700 kg/m^3 = 2700 kg/m^3
# Rohr 150×150×5 L230 (Stahl lt. CAD)
m_R150 := 5.104 kg = 5.104 kg
m_R100 := 1.742 kg = 1.742 kg  # Rohr 100×100×5 L130 (Stahl lt. CAD)
V_Al := 372.51 cm*1 cm*1 cm = 372.51 cm^3
# Deckel BT022/025/026, 4× BT023, 8× BT024, 3× BT021
m_Al := V_Al*ρ_Al = 1.00578 kg
m_Motor := 2.3 kg = 2.3 kg  # MSMF082L1U1 (Datenblatt)
m_Getr := 9 kg = 9 kg  # AB115 2-stufig (APEX)
m_Verl := 2.19 kg = 2.19 kg  # BG003 Verlängerung inkl. Rollen, Lager (CAD)
m_SWS := 0.86 kg = 0.86 kg
# SWK-020 + SWA-020 (SCHUNK)
m_Adapt := 64.72 cm*1 cm*1 cm*ρ_Al = 0.174744 kg
# A-SWK-020-ISO-A50, CAD-Volumen × Al (CAD-Masse 1,62 kg ist falsch, Dichte 25 g/cm³)
m_ges := m_R150 + m_R100 + m_Al + m_Motor + m_Getr + m_Verl + m_SWS + m_Adapt = 22.3765 kg
# ohne Kabel und Schrauben
m_zul := 20 kg = 20 kg  # Nenntraglast Fairino FR20
ν_m := m_ges/m_zul = 1.11883  # > 1 → Traglast überschritten
# Variante: Gehäuserohre aus Aluminium statt Stahl (wie in Fairino_Daten.docx beschrieben):
m_gesAl := m_ges - (m_R150 + m_R100)*(1 - 2.7/7.85) = 17.8852 kg
ν_mAl := m_gesAl/m_zul = 0.89426
# Schwerpunkt (Abschätzung aus der CAD-Lage der Bauteile, gemessen ab Gehäuseoberkante, positiv nach unten). Wechsler und Adapter liegen ca. 57 mm darüber:
z_S := (m_R100*68 mm + m_R150*180 mm + m_Al*150 mm + m_Motor*95 mm + m_Getr*221 mm + m_Verl*353 mm - (m_SWS + m_Adapt)*28 mm)/m_ges = 184.999 mm
# Schwerpunkt unter Gehäuseoberkante
L_z := z_S + 57 mm = 241.999 mm  # Schwerpunktabstand vom Roboterflansch
