# Biegekopf Berechnungen
# Konstanten:
f_dyn := 2
μ := 0.15
# Schraubenquerschnitte (Spannungsquerschnitte As)
A_SM6 := 20.1 mm^2
A_SM8 := 36.6 mm^2
# Festigkeitsklasse 8.8
R_p0.2 := 640 N/mm^2
# Vorspannkraft (angenommen)
F_VM6 := 0.7*A_SM6*R_p0.2 = 9.0048 kN
F_VM8 := 0.7*A_SM8*R_p0.2 = 16.3968 kN
# Deckel / Roboterflansch
m_1 := 15 kg
l_1 := 0.1836 m
n_1 := 4
r_1 := 0.045 m
# M6,8.8
d_K1 := 10 mm
d_B1 := 6.5 mm
F_G1 := m_1*g = 147.1 N
F_G1dyn := F_G1*f_dyn = 294.2 N
F_scher1 := F_G1dyn/n_1 = 73.5499 N
M_kipp1 := F_G1dyn*l_1 = 54.015 N*m
F_axialmax1 := 2*M_kipp1/(n_1*r_1) = 600.167 N
S_Bruch1 := A_SM6*R_p0.2/F_axialmax1 = 21.434
S_Klaff1 := F_VM6/F_axialmax1 = 15.0038
S_Rutsch1 := μ*F_VM6/F_scher1 = 18.3647
A_press1 := π/4*(d_K1^2 - d_B1^2) = 45.3567 mm^2
p_1 := F_axialmax1/A_press1 = 13.2321 MPa
# Motorhalterung
m_2 := 2.7 kg
l_2 := 0.03464 m
n_2 := 4
r_2 := 0.045 m
# M6, 8.8
F_G2 := m_2*g = 26.478 N
F_G2dyn := F_G2*f_dyn = 52.9559 N
F_scher2 := F_G2dyn/n_2 = 13.239 N
M_kipp2 := F_G2dyn*l_2 = 1.83439 N*m
F_axialmax2 := 2*M_kipp2/(n_2*r_2) = 20.3821 N
S_Bruch2 := A_SM6*R_p0.2/F_axialmax2 = 631.141
S_Klaff2 := F_VM6/F_axialmax2 = 441.799
S_Rutsch2 := μ*F_VM6/F_scher2 = 102.026
# Getriebehalterung
m_3 := 9 kg
l_3 := 0.04501 m
n_3 := 4
r_3 := 0.065 m
# M8, 8.8
d_K3 := 12.5 mm
d_B3 := 9 mm
F_G3 := m_3*g = 88.2599 N
F_G3dyn := F_G3*f_dyn = 176.52 N
F_scher3 := F_G3dyn/n_3 = 44.1299 N
M_kipp3 := F_G3dyn*l_3 = 7.94515 N*m
F_axialmax3 := 2*M_kipp3/(n_3*r_3) = 61.1166 N
S_Bruch3 := A_SM8*R_p0.2/F_axialmax3 = 383.268
S_Klaff3 := F_VM8/F_axialmax3 = 268.287
S_Rutsch3 := μ*F_VM8/F_scher3 = 55.7336
A_press3 := π/4*(d_K3^2 - d_B3^2)
p_3 := F_axialmax3/A_press3 = 1.0341 MPa
# Distanzleisten
m_4 := 11.011 kg
l_4 := 144.1 mm
r_4 := 57.5 mm
n_4 := 3
F_G4 := m_4*g = 107.981 N
F_G4dyn := F_G4*f_dyn = 215.962 N
F_scher4 := F_G4dyn/n_4 = 71.9873 N
M_kipp4 := F_G4dyn*l_4 = 31.1201 N*m
F_axialmax4 := M_kipp4/r_4 = 541.22 N
S_Bruch4 := A_SM6*R_p0.2/F_axialmax4 = 23.7685
S_Klaff4 := F_VM6/F_axialmax4 = 16.638
S_Rutsch4 := μ*F_VM6/F_scher4 = 18.7633
