# Gewicht Biegekopf
m_Biege := 2.3 kg + 9 kg + 1.226 kg + 0.782 kg + 0.378 kg + 0.172 kg + 0.172 kg + 0.31 kg
m_Biege = 14.34 kg  # Gewicht von Motor, Getriebe, Gehäuse
m_Verl := 0.493 kg + 0.397 kg + 0.13 kg + 0.102 kg + 0.139 kg + 0.139 kg
m_Verl = 1.4 kg
