# Motor & Getriebeauslegung
# Bekannte Daten
# Material: Edelstahl 316 (1.4401)
d_aussen := 14 mm  # Außendurchmesser
t := 1 mm  # Wandstärke
d_innen := 12 mm  # Innendurchmesser
R_e := 220 MPa  # Streckgrenze
d_fest := 56.2 mm  # Durchmesser feste Rolle
d_biege := 56.2 mm  # Durchmesser Biegerolle
l_rollen := 70.7 mm  # Rollenabstand (Mitte-Mitte)
d_Stift := 25 mm  # Stiftdurchmesser
Δφ := 3.14159 rad  # Maximaler Schwenkwinkel
l_HebelMax := 0.3 m  # Maximale Hebellänge
Δt := 2 s  # Zeit für eine 180° Biegung
# Flächenträgheitsmoment des Rohres (Widerstand des Rohrquerschnitts gegen Biegung)
I := π/64*(d_aussen^4 - d_innen^4)
I = 867.865 mm^4
# Widerstandsmoment (Zur Berechnung des Biegemoments bis zur Streckgrenze
W := I/(d_aussen/2)
W = 123.981 mm^3
# Fließmoment des Rohres (Moment bei dem das Rohr zu fließen beginnt)
M_F := R_e*W
M_F = 27.2758 N*m
# Tatsächlich benötigtes Biegemoment
k := 1.5
M_B := M_F*k
M_B = 40.9136 N*m
# Sicherheitsfaktor
S := 2
M_Auslegung := M_B*S
M_Auslegung = 81.8273 N·m
M_Auslegungrund := 100 N·m
# Kraft am Hebel
F := 100/0.3
F = 333.333
# Winkelgeschwindigkeit
ω := Δφ/Δt
ω = 1.57079 rad/s
# Mechanische Leistung
P := M_Auslegungrund*ω
P = 157.079 W
# Getriebeauswahl
# Gewähltes Getriebe: Neugart PLE80
i := 120
T_M := 2.4 N*m
η := 95%
T_A := T_M*i*η
T_A = 273.6 N*m
# Wellendurchmesser Antriebswelle
# Material: 42CrMo4
τ_zul := 80 MPa
M_Welle := 100000 N*mm
d := nthroot(16*M_Welle/(π*τ_zul), 3)
d = 18.5336 mm
# Ergebnis
# Servomotor: 750W AC-Servomotor
# Getriebe: Neugart PLE80, 40:1
# Nenndrehmoment Ausgang: 91Nm
# Spitzendrehmoment Ausgang: 266Nm
# Antriebswelle: 25mm
# Lagerung: 2x Schrägkugellager
# Auslegungsdrehmoment: 100Nm
# Tatsächliche Werte
x_1 := 20 kg
F_1 := x_1*g
F_1 = 196.133 N
x_2 := 34 kg
F_2 := x_2*g
F_2 = 333.426 N
x_3 := 23 kg
F_3 := x_3*g
F_3 = 225.553 N
x_4 := 42 kg
F_4 := x_4*g
F_4 = 411.879 N
x_5 := 48 kg
F_5 := x_5*g
F_5 = 470.719 N
l1 := 80 cm
M1 := F_1*l1 = 156.906 N*m
l2 := 50 cm
M2 := F_2*l2 = 166.713 N*m
l3 := 60 cm
M3 := F_3*l3 = 135.332 N*m
l4 := 40 cm
M4 := F_4*l4 = 164.752 N*m
l5 := 30 cm
M5 := F_5*l5 = 141.216 N*m
M_max := M2
M_max = 166.713 N*m
S := 1.3
M_Nötig := M_max*S
M_Nötig = 216.727 N*m
M_N := 2.39 N*m
i_neu := 100
η_neu := 0.94
M_A := M_N*i_neu*η_neu
M_A = 224.66 N*m
# Getriebe: https://sesamemotor.en.taiwantrade.com/product/1830065?utm_source=chatgpt.com
