D_a := 14 mm  # Außendurchmesser
t := 1 mm  # Wandstärke
D_i := D_a - 2*t = 12 mm  # Innendurchmesser
σ_y := 205 MPa  # min Streckgrenze 316er Stahl
r := 150 mm  # Hebelarmlänge (später variieren)
# Wiederstandsmomente von Hohlquerschnitt:
# Elastisch:
W_el := π/32*(D_a^4 - D_i^4)/D_a = 123.981 mm^3
# Plastisch:
W_pl := (D_a^3 - D_i^3)/6 = 169.333 mm^3
# Sicherheitsfaktor:
S_F := 1.3
# Biegemoment:
M := S_F*σ_y*W_pl = 45.1273 N*m
# Kraft aus Moment und Hebelarm:
F := M/r = 300.849 N
F_kg := F/g = 30.678 kg
